vr 28 nov 2025 14:50:03 CET
;; 1. Based on: run00
;; 2. Description: CeftriaxPro Base Model - Two Compartment
;; x1. TEAM2
;; 2015-11-24
$PROBLEM    CeftriaxPro Base Model Development
$INPUT      ID TIME DOSE=AMT RATE CONC=DV CONC_ID BW SEX ALB SCR eGFR
            AGE ETHNI PR DVID CMT MDV EVID
$DATA      dataset.csv IGNORE=@ IGNORE=(CONC_ID.EQ.1)
 ;; ignores rows showing total plasma concentration
$SUBROUTINE ADVAN3 ;; 2-compartment model
            TRANS4 ;; CL,V1,V2,Q
$PK
TVCL = THETA(1)
  CL = TVCL * EXP(ETA(1))
 TVV1 = THETA(2)
   V1 = TVV1 * EXP(ETA(2))
 TVV2 = THETA(3)
   V2 = TVV2
 TVQ = THETA(4)
   Q = TVQ
   K = CL/V1
 K12 = Q/V1
 K21 = Q/V2
  S2 = V1/1 ;; scale prediction based on DOSE (mmol) and DV (mmol/L)

$THETA  (0,7) ; ; based on phase 1 trial
 (0,70) ; _; based on phase 1 trial
 (0,20) ; __;
 (0,30)
; explore dataset & literature, SAME order as PK
$OMEGA  0.05  ;        ___  ; not yet known, outcome picked for next models, put a relatively small number
 0.05  ;       ____  ; not yet known, outcome picked for next models
 ;; variance covariance matrix for interindividual variability
$SIGMA  0.1  ;      _____  ; EPS(1) for proportional error, not yet known, outcome picked for next models
;; variance covariance matrix for residual error
$ERROR
IPRED = F
Y = IPRED + IPRED*ERR(1)
W = SQRT((IPRED*SQRT(SIGMA(1,1)))**2)
IRES  = CONC - IPRED
IWRES = IRES / W

$ESTIMATION METHOD=1 INTERACTION ;; FOCE-I
            MAXEVAL=9999 SIG=3 PRINT=5
;;$COV PRINT=E;; second derivatives using -2log(likelihood), blank means sandwich method
$COVARIANCE UNCONDITIONAL MATRIX=S
 ;; output table for standard outcomes
$TABLE      ID TIME DV EVID PRED IPRED WRES RES CWRES NOPRINT
            ONEHEADER FILE=run01_sdtab
 ;; output table for PK parameters
$TABLE      ID CL V1 V2 Q K K12 K21 NOPRINT NOAPPEND ONEHEADER
            FILE=run01_patab
 ;; output table for categorical covariates
$TABLE      ID SEX ETHNI NOPRINT NOAPPEND ONEHEADER FILE=run01_catab
 ;; output table for continuous covariates
$TABLE      ID BW ALB SCR eGFR AGE NOPRINT NOAPPEND ONEHEADER
            FILE=run01_cotab

NM-TRAN MESSAGES
 WARNINGS AND ERRORS (IF ANY) FOR PROBLEM    1
 (WARNING  2) NM-TRAN INFERS THAT THE DATA ARE POPULATION.
 (WARNING  79) SIGMA IS USED ON THE RIGHT. WITH A SUBSEQUENT RUN, IF AN
 INITIAL ESTIMATE OF A DIAGONAL BLOCK OF SIGMA IS TO BE COMPUTED BY
 NONMEM, THAT BLOCK WILL BE SET TO AN IDENTITY MATRIX DURING THAT
 COMPUTATION. THIS COULD LEAD TO AN ARITHMETIC EXCEPTION.*
 * THE MAXIMUM NUMBER OF WARNINGS OF ONE OR MORE TYPES WAS REACHED.
 IT IS POSSIBLE THAT SOME WARNING MESSAGES WERE SUPPRESSED.
Note: Analytical 2nd Derivatives are constructed in FSUBS but are never used.
      You may insert $ABBR DERIV2=NO after the first $PROB to save FSUBS construction and compilation time

1NONLINEAR MIXED EFFECTS MODEL PROGRAM (NONMEM) VERSION 7.6.0 (nm760)
 ORIGINALLY DEVELOPED BY STUART BEAL, LEWIS SHEINER, AND ALISON BOECKMANN
 CURRENT DEVELOPERS ARE ROBERT BAUER, ICON DEVELOPMENT SOLUTIONS,
 AND ALISON BOECKMANN. IMPLEMENTATION, EFFICIENCY, AND STANDARDIZATION
 PERFORMED BY NOUS INFOSYSTEMS.
 PROBLEM NO.:         1
 CeftriaxPro Base Model Development
 TOT. NO. OF OBS RECS:      496
 TOT. NO. OF INDIVIDUALS:       33
 TWO COMPARTMENT MODEL (ADVAN3)
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 #TBLN:      1
 #METH: First Order Conditional Estimation with Interaction
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
 #TERM:
0MINIMIZATION TERMINATED
 DUE TO ROUNDING ERRORS (ERROR=134)
 NO. OF FUNCTION EVALUATIONS USED:      302
 NO. OF SIG. DIGITS UNREPORTABLE
0PARAMETER ESTIMATE IS NEAR ITS BOUNDARY

 ETABAR IS THE ARITHMETIC MEAN OF THE ETA-ESTIMATES,
 AND THE P-VALUE IS GIVEN FOR THE NULL HYPOTHESIS THAT THE TRUE MEAN IS 0.

 ETABAR:         6.6849E-03  5.6678E-03
 SE:             5.9308E-02  6.7147E-02
 N:                      33          33

 P VAL.:         9.1026E-01  9.3273E-01

 ETASHRINKSD(%)  4.3923E+00  3.6758E+00
 ETASHRINKVR(%)  8.5916E+00  7.2164E+00
 EBVSHRINKSD(%)  3.8417E+00  3.6355E+00
 EBVSHRINKVR(%)  7.5358E+00  7.1388E+00
 RELATIVEINF(%)  9.2105E+01  9.2500E+01
 EPSSHRINKSD(%)  5.4689E+00
 EPSSHRINKVR(%)  1.0639E+01


 TOTAL DATA POINTS NORMALLY DISTRIBUTED (N):          496
 N*LOG(2PI) CONSTANT TO OBJECTIVE FUNCTION:    911.58702493903525
 OBJECTIVE FUNCTION VALUE WITHOUT CONSTANT:   -4302.2150575595469
 OBJECTIVE FUNCTION VALUE WITH CONSTANT:      -3390.6280326205115
 REPORTED OBJECTIVE FUNCTION DOES NOT CONTAIN CONSTANT

 TOTAL EFFECTIVE ETAS (NIND*NETA):                            66


 #TERE:
 Elapsed estimation  time in seconds:     2.65
0S MATRIX ALGORITHMICALLY SINGULAR
0COVARIANCE MATRIX UNOBTAINABLE
 Elapsed covariance  time in seconds:     0.19
 Elapsed postprocess time in seconds:     0.04

 ********************               FIRST ORDER CONDITIONAL ESTIMATION WITH INTERACTION              ********************
 #OBJT:**************                       MINIMUM VALUE OF OBJECTIVE FUNCTION                      ********************
 #OBJV:********************************************         -4302.215       *********************************************

 ********************               FIRST ORDER CONDITIONAL ESTIMATION WITH INTERACTION              ********************
 ********************                             FINAL PARAMETER ESTIMATE                           ********************

 THETA - VECTOR OF FIXED EFFECTS PARAMETERS   *********
         TH 1      TH 2      TH 3      TH 4
         4.86E+00  7.00E-01  5.97E+01  5.92E+02

 OMEGA - COV MATRIX FOR RANDOM EFFECTS - ETAS  ********
         ETA1      ETA2
 ETA1
+        1.27E-01
 ETA2
+        0.00E+00  1.60E-01

 SIGMA - COV MATRIX FOR RANDOM EFFECTS - EPSILONS  ****
         EPS1
 EPS1
+        7.41E-02

 OMEGA - CORR MATRIX FOR RANDOM EFFECTS - ETAS  *******
         ETA1      ETA2
 ETA1
+        3.56E-01
 ETA2
+        0.00E+00  4.00E-01

 SIGMA - CORR MATRIX FOR RANDOM EFFECTS - EPSILONS  ***
         EPS1
 EPS1
+        2.72E-01
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 Elapsed finaloutput time in seconds:     0.04
 #CPUT: Total CPU Time in Seconds,        2.963
